f(x) := 1/(1 + e^(-x))
localField := 0.008
z := 0
y := 0.502
x := 0.5038
a := 1
eta := 1
d := 0
f(localField) → 0.501999989333
localGrad := (z - y)*d/dlocalField(f(localField))
delta := a*d + eta*localGrad*x
d/dx(f(x)) → 0.234784301645
localGrad → -0.125497992021
delta → -0.0632258883804
